# Tenglamalar sistemasini Gaus usuli yordamida yechish.
ORIGIN ≡ 1
Gaus(A, B) :=
    A ← augment(A, B)
    for i ∈ 1 .. rows(A) - 1
        k ← A[i, i]
        for j ∈ 1 .. cols(A)
            A[i, j] ← A[i, j]/k
        for h ∈ i + 1 .. rows(A)
            t ← A[h, i]
            for m ∈ 1 .. cols(A)
                A[h, m] ← A[h, m] - A[i, m]*t
    m ← rows(A)
    n ← cols(A)
    x[m] ← A[m, n]/A[m, n - 1]
    for i ∈ m - 1 .. 1
        x[i] ← (A[i, n] - sum(A[i, j]*x[j], j = i + 1 .. m))/A[i, i]
    x
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x[1] + 4*x[2] == 5
2*x[1] + 5*x[2] == 7
A := [1, 4; 2, 5]
B := [5; 7]
Gaus(A, B) = [1; 1]
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x[1] + 8*x[2] - 3*x[3] == 6
3*x[1] + 4*x[2] + 5*x[3] == 12
C := [6; 12; 12]
Z := [1, 8, -3; 3, 4, 5; 6, -3, 9]
6*x[1] - 3*x[2] + 9*x[3] == 12
Gaus(Z, C) = [1; 1; 1]
a := [-1, 6, 1; -1, -1, 6; 6, -1, -1]
b := [32; 42; 11.33]
Gaus(a, b) = [4.0629; 4.6031; 8.44433]
x := a^-1*b
x = [4.0629; 4.6031; 8.44433]
a := [1.16, 0.83, -0.66; 0.45, -0.54, 0.83; 0.32, 0.28, 1.06]
|a| =  # no stored result
